atom_style	atomic
units		metal
dimension	3
boundary	p p p
processors	* * *
# ---------------------------------------------------------
read_data       data.bulk.Si.512.atoms					#data file with positions
#replicate	8 8 8							#To create supercell
#read_restart	restart.anneal.NVE.6400088				#To restart from a previous run
mass		1 28.0855	#Silicon mass
pair_style	tersoff		#potential
pair_coeff	* * ../SiCGe.tersoff Si(D)
#--------------- Simulation control parameters ----------------------------------------------------------
variable	T equal 2000              				# Kelvin
variable	V equal vol             				# A^3
variable	dt equal 0.0005          				# 0.5fs; in picoseconds = 1e-12 s
variable	NRUNNVT equal 200000
variable        NRUNNPT equal 2000000
variable	NRUNanneal equal 6000000
variable	NRUNNVE equal 200000
variable	thermocalc equal 20000
variable	snapprint equal 200000
variable        Lx equal xhi-xlo
variable        Ly equal yhi-ylo
print           "Lx = ${Lx} A"
print           "Ly = ${Ly} A"
timestep  	${dt}
thermo_style	custom step temp pe etotal press pxx pyy pzz lx ly lz
# -------------- Print structure -----------------------
dump		snapxyz all custom ${snapprint} sisnap.lammpstrj id type x y z
# -------------- Relax Structure at 0K --------------------------
fix		filmrelax all box/relax x 0 y 0 z 0 couple none		#Try different methods to relax different systems
minimize	0.0 1.0e-8 100000 10000000
min_style	sd
min_modify	dmax 0.2
thermo		100
write_restart	restart.min.*
# -------------- NVT Thermalization ------------------------------
restart		500000 restart
thermo          ${thermocalc}
velocity	all create $T ${SEED} mom yes rot yes dist gaussian
fix		NVT all nvt temp $T $T 0.05 tchain 10
run		${NRUNNVT}
unfix		NVT
write_restart	restart.NVT.*
# ------------ Annealing -----------------------------------------
fix             equil all langevin $T 300 0.05 ${langSEED} tally yes zero yes
fix             NVE all nve
run             ${NRUNanneal}
unfix           equil
unfix           NVE
write_restart	restart.anneal.300.*
# -------------- NVE Equilibration ----------------------------------
fix             NVE all nve
dump            snapNVExyz all custom ${snapprint} snap.NVE.lammpstrj id type x y z
run             ${NRUNNVE}
unfix           NVE
write_restart   restart.anneal.NVE.*
# ------------ Pressure Relaxation -----------------------------------------
fix             NPT all npt temp 300 300 0.05 x 0 0 0.5 y 0 0 0.5 couple none tchain 10
run             ${NRUNNPT}
unfix           NPT
write_restart   restart.NPT.300.*
# -------------- NVE Equilibration ----------------------------------
fix             NVE all nve
dump            snapNVEPxyz all custom ${snapprint} snap.NVE.pressure.lammpstrj id type x y z
run             ${NRUNNVE}
unfix           NVE
write_restart   restart.NVE.pressure.*

write_restart   restart.final.*
