#----------- Global declaration ----
variable        T       equal 300           # Kelvin
variable        kB      equal 8.6173324e-5  # [eV/K] Boltzmann
variable        A2m     equal 1.0e-10
variable        ps2s    equal 1.0e-12
variable        eV2J    equal 1.60217646e-19
variable        convert equal ${eV2J}/${A2m}/${A2m}/${ps2s}

# ----------- Basic setup ----
atom_style      atomic
units           metal
dimension       3
boundary        p p p
processors      * 1 1

# ----------- Define lattice to use for group definitions ----
#lattice        custom 43.4993955 a1 1.0 0.0 0.0 a2 0.0 0.24976543064834084878 0.0 a3 0.0 0.0 6.3456973787 basis 0.0 0.0 0.0	##Underlining lattice is with twice the lattice parameter, z-direction cell parameter is 14.** times the lattice parameter to ensure there is a vacuum block with the film

read_data       data.vels

#----------- Define potential and useful quantities ----
pair_style      tersoff				##Potential
pair_coeff      * * SiCGe.tersoff Si(D) Ge
neighbor	0.5 bin
timestep        0.0005				##1 fs timestep
thermo          2000

variable	T equal 300
variable	dT equal 20
variable	TR equal $T+${dT}/2
variable	TL equal $T-${dT}/2

variable	filename string etc
variable        Vac equal 40.00
variable        NX equal lx-${Vac}
print           ${NX}
variable        x_min equal (xlo+${Vac}/2)
print           ${x_min}
variable        x_max equal (xhi-${Vac}/2)
print           ${x_max}
variable	lFixed equal 10.8
variable 	lBath equal 54.3
variable	lSlab equal 2.7
variable	siFixed equal 10.6
variable	siBath equal 27
variable	geFixed equal 11
variable	geBath equal 28

# ----------- Fix some atoms to avoid drift ----      #Width of block with fixed atoms
variable	x1 equal ${x_min}+${siFixed}
variable	x2 equal ${x_max}-${geFixed}
variable	x3 equal ${x1}+${siBath}
variable	x4 equal ${x2}-${geBath}
region          fixed1 block INF ${x1} INF INF INF INF	#Atoms in the block are fixed
region          fixed2 block ${x2} INF INF INF INF INF	#Atoms in the other end also fixed
region          fixed  union 2 fixed1 fixed2
group           gfixed region fixed				#All fixed atoms
group           gmoves subtract all gfixed			#Rest of the atoms move

############################# Velocity groups #################################################
#------- Interface ----------
variable        xinter equal 58.03532 #coordinate of interface; must match exactly for forces and vels
variable        dmid equal 3
variable        xmid equal ${xinter}
variable        xmidL equal ${xmid}-0.075
variable        xmidR equal ${xmid}+0.075
variable        xmidlo equal ${xmid}-${dmid}
variable        xmidhi equal ${xmid}+${dmid}

region          left block ${xmidlo} ${xmidL} INF INF INF INF units box
region          right block ${xmidR} ${xmidhi} INF INF INF INF units box
group           interface_left region left
group           interface_right region right
group           interface union interface_left interface_right


#------- LBath/Center ----------
variable        xsi equal 38 #coordinate of interface; must match exactly for forces and vels
variable        xmid equal ${xsi}
variable        xmidL equal ${xmid}-0.075
variable        xmidR equal ${xmid}+0.075
variable        xmidlo equal ${xmid}-${dmid}
variable        xmidhi equal ${xmid}+${dmid}

region          sileft block ${xmidlo} ${xmidL} INF INF INF INF units box
region          siright block ${xmidR} ${xmidhi} INF INF INF INF units box
group           si_left region sileft
group           si_right region siright
group           si union si_left si_right


#------- RBath/center ----------
variable        xge equal 81.2 #coordinate of interface; must match exactly for forces and vels
variable        xmid equal ${xge}
variable        xmidL equal ${xmid}-0.075
variable        xmidR equal ${xmid}+0.075
variable        xmidlo equal ${xmid}-${dmid}
variable        xmidhi equal ${xmid}+${dmid}

region          geleft block ${xmidlo} ${xmidL} INF INF INF INF units box
region          geright block ${xmidR} ${xmidhi} INF INF INF INF units box
group           ge_left region geleft
group           ge_right region geright
group           ge union ge_left ge_right

#------- LBath ----------
variable        xge equal 23.5 #coordinate of interface; must match exactly for forces and vels
variable        xmid equal ${xge}
variable        xmidL equal ${xmid}-0.075
variable        xmidR equal ${xmid}+0.075
variable        xmidlo equal ${xmid}-${dmid}
variable        xmidhi equal ${xmid}+${dmid}

region          geleft1 block ${xmidlo} ${xmidL} INF INF INF INF units box
region          geright1 block ${xmidR} ${xmidhi} INF INF INF INF units box
group           ge_left1 region geleft1
group           ge_right1 region geright1
group           ge1 union ge_left1 ge_right1

#------- RBath ----------
variable        xge equal 96.6895 #coordinate of interface; must match exactly for forces and vels
variable        xmid equal ${xge}
variable        xmidL equal ${xmid}-0.075
variable        xmidR equal ${xmid}+0.075
variable        xmidlo equal ${xmid}-${dmid}
variable        xmidhi equal ${xmid}+${dmid}

region          geleft2 block ${xmidlo} ${xmidL} INF INF INF INF units box
region          geright2 block ${xmidR} ${xmidhi} INF INF INF INF units box
group           ge_left2 region geleft2
group           ge_right2 region geright2
group           ge2 union ge_left2 ge_right2


###########################################################################################
# ----------- Define cold reservoir ----	#Total width of fixed atoms + reservoir atoms
region          hot block ${x4} ${x2} INF INF INF INF		#Atoms in the cold reservoir
group           ghot region hot

# ----------- Define hot reservoir ----
region          cold block ${x1} ${x3} INF INF INF INF	#Atoms in the end slab in the hot reservoir
group           gcold region cold


######
#group		blocks union gfixed ghot gcold interface si ge		#For checking the region definitions
#dump		blocks blocks atom 10 blocks.lammpstrj  #For checking the region definitions
######


# ----------- Distance between reservoirs -----------
variable        Length equal ${NX}-(2*${lFixed}+2*${lBath})			#First and last slab act as reservoirs
print           "!Length = ${Length} A"
variable	Lengthx equal lx
print		"!lx = ${Lengthx} A"
variable        Lengthcellx equal ${lSlab}
print           "!lcellx = ${Lengthcellx} A"

# ----------- Cross section area -----------
variable        Area    equal ly*lz
print           "!Area = ${Area} A^2"

# ----------- Real volume occupied by atoms excluding reservoirs ------
variable    	Volume  equal lx*ly*lz
print       	"!Volume = Lx*Ly*Lz = ${Volume} A^3"

# ----------- Print structure ----------------
dump            snap all atom 20000 snap.lammpstrj #20000

# ----------- Initialize velocities ----------------
velocity        gmoves create ${T} ${SEED} mom yes rot yes dist gaussian	##The moving atoms assigned velocities in a gaussian distrn
velocity	gfixed set 0.0 0.0 0.0 units box

# ----------- Compute real temperature excluding frozen atoms --
compute         real_temp gmoves temp

# ----------- Equilibration and thermalization ----------------

variable	Tis atom ${TL}+x/xhi*(${TR}-${TL}) #ty's addition

reset_timestep	0
#fix             NVT gmoves nvt temp ${T} ${T} 0.05 tchain 10
fix		NVE gmoves nve #ty's addition
fix		NVT gmoves langevin v_Tis 1.0 0.05 ${SEED} # zero yes # ty's addition
fix		FREEZE gfixed setforce 0.0 0.0 0.0
thermo_style	custom step temp c_real_temp pe etotal press pxx pyy pzz
thermo_modify	flush yes

run        	1000000
unfix           NVT
write_restart   restart.*
dump_modify     snap every 2000000

# ----------- Start NEMD and calculate Temp profile -------
restart         500000 restart
variable	stp equal step
variable	stept0 equal ${stp}
fix		LTC gcold langevin ${TL} ${TL} 0.5 ${langSEED} tally yes zero yes
fix		LTH ghot  langevin ${TR} ${TR} 0.5 ${langSEED} tally yes zero yes
run		2
variable	HFluxO equal f_LTC/v_Area/(step-v_stept0)/dt*v_convert
variable	HFluxI equal f_LTH/v_Area/(step-v_stept0)/dt*v_convert
thermo_style	custom step temp c_real_temp pe etotal press pxx pyy pzz f_LTC f_LTH v_HFluxO v_HFluxI
thermo_modify	flush yes
compute		ke gmoves ke/atom
variable 	temp atom c_ke/1.5/v_kB
compute         cc1 gmoves chunk/atom bin/1d x lower ${lSlab} bound x ${lSlab} ${x2} units box
compute         cc2 gmoves chunk/atom bin/1d x lower ${lSlab} bound x ${lSlab} ${x2} units box
fix 		cc1_T gmoves ave/chunk 1 200000 200000 cc1 v_temp file tmp.profile.0
run 		10000000
write_restart   restart.*

fix		cc2_T gmoves ave/chunk 1 200000 200000 cc2 v_temp file tmp.profile.final

#################### Collect Velocities ############################
#---- Interface -------
variable	dt_dump equal 10
dump            ivels interface custom ${dt_dump} interface.vels.dat id type vx vy vz
dump_modify     ivels format line "%d %d %0.8g %0.8g %0.8g"
dump_modify     ivels sort id

dump            ipos interface custom 1000 interface.pos.dat id type x y z
dump_modify     ipos format line "%d %d %0.8g %0.8g %0.8g"
dump_modify     ipos sort id

#----- LBATH/center -----------
variable        dt_dump equal 10
dump            sivels si custom ${dt_dump} lbathCenter.vels.dat id type vx vy vz
dump_modify     sivels format line "%d %d %0.8g %0.8g %0.8g"
dump_modify     sivels sort id

dump            sipos si custom 1000 lbathCenter.pos.dat id type x y z
dump_modify     sipos format line "%d %d %0.8g %0.8g %0.8g"
dump_modify     sipos sort id

#------ RBATH/center ----------
variable        dt_dump equal 10
dump            gevels ge custom ${dt_dump} rbathCenter.vels.dat id type vx vy vz
dump_modify     gevels format line "%d %d %0.8g %0.8g %0.8g"
dump_modify     gevels sort id

dump            gepos ge custom 1000 rbathCenter.pos.dat id type x y z
dump_modify     gepos format line "%d %d %0.8g %0.8g %0.8g"
dump_modify     gepos sort id


#------ LBath ----------
variable        dt_dump equal 10
dump            gevels1 ge1 custom ${dt_dump} lbath.vels.dat id type vx vy vz
dump_modify     gevels1 format line "%d %d %0.8g %0.8g %0.8g"
dump_modify     gevels1 sort id

dump            gepos1 ge1 custom 1000 lbath.pos.dat id type x y z
dump_modify     gepos1 format line "%d %d %0.8g %0.8g %0.8g"
dump_modify     gepos1 sort id

#------ RBath ----------
variable        dt_dump equal 10
dump            gevels2 ge2 custom ${dt_dump} rbath.vels.dat id type vx vy vz
dump_modify     gevels2 format line "%d %d %0.8g %0.8g %0.8g"
dump_modify     gevels2 sort id

dump            gepos2 ge2 custom 1000 rbath.pos.dat id type x y z
dump_modify     gepos2 format line "%d %d %0.8g %0.8g %0.8g"
dump_modify     gepos2 sort id


##################################################################

run             10000000
write_restart	restart.final.*
undump          snap
