############ simulation setup #############
atom_style	atomic
units		metal
dimension	3
boundary	p p p
processors	* * *

#---------- structure --------------------
read_data       data.relax
pair_style	tersoff
pair_coeff	* * SiCGe.tersoff Si(D) Ge
variable	T equal 300
timestep  	0.0005


############# 0K relaxation #################
thermo_style	custom step temp pe etotal press pxx pyy pzz lx ly lz fmax fnorm
thermo		1000
dump		snap all custom 1000 snap.lammpstrj id type x y z

#------- steepest descent -----------------
fix		relax all box/relax x 0 y 0 z 0 couple none
minimize	0.0 1.0e-9 1000000 10000000
min_style	sd
min_modify	dmax 0.2


############ NVT thermalization ####################
thermo_style	custom step temp pe etotal press pxx pyy pzz lx ly lz
dump_modify     snap every 10000
thermo          10000

#--------- initialize velocities -----------
velocity	all create $T ${SEED} mom yes rot yes dist gaussian
fix		NVT all nvt temp $T $T $(dt*100) tchain 10
run		1000000
unfix		NVT


########### NVE equilibration ######################
fix             NVE all nve
run             1000000
unfix           NVE


########### NPT relaxation #########################
fix             NPT all npt temp $T $T $(dt*100) x 0 0 $(dt*1000) y 0 0 $(dt*1000) z 0 0 $(dt*1000) couple none tchain 10
run             1000000
unfix           NPT


########### NVE equilibration ######################
fix             NVE all nve
run             1000000
unfix           NVE

#-------------- write relaxed structure to data file ----------------
write_data	data.relaxed nocoeff
